# LAMMPS input script for simulating He molecules in a bubble with collision behavior

# Initialize LAMMPS
clear
units real
dimension 3
# boundary f f f
boundary s s s
atom_style full

# Constants for Ar
variable pi equal 3.1415926
variable boltzmann equal 8.314462618 # Boltzmann constant in J/(mol*K)
variable kB equal 1.380649e-23
variable NA equal 6.02214076e23
variable m equal 39.95 # Mass of He in g/mol (converted to atomic mass units)
variable d equal 3.66 # Diameter of He in Ångströms
variable epslion_lj equal 116.81
variable epsilon equal ${boltzmann}*${epslion_lj}*0.00023901
variable epsilon_water_o equal  116.402
variable epsilon_water equal ${boltzmann}*${epsilon_water_o}*0.00023901
variable sigma equal 3.401
variable sigma_water equal 3.463

# Parameters when using ensemble particles
variable N_ensem equal 1e4  # number of ensemble particles
variable initialR equal 4.5e-6
variable Tinfty equal 300
variable Pinfty equal 101325
variable alpha1 equal 0.148e-6
variable V equal 4/3*${pi}*${initialR}^3
variable N equal ${Pinfty}*$V/(${kB}*${Tinfty})
variable scalefactor equal $N/${N_ensem}
variable rscalefactor equal ${scalefactor}^(1.0/3.0)
variable d_ensem equal ${scalefactor}^(1.0/3.0)*$d      #Vg*N=const
variable m_ensem equal ${scalefactor}*$m     # m*N=const
variable epsilon_ensem equal ${epsilon}*${scalefactor}
variable epsilon_water_ensem equal ${epsilon_water}*${scalefactor}
variable sigma_ensem equal ${sigma}*${rscalefactor}
variable sigma_water_ensem equal ${sigma_water}*${rscalefactor}

# for 100 ps
variable Tb0 equal 2.5301e+03
variable Tbl equal 315.3043
variable delta equal 2520.84869818185
variable delta_1000 equal 2520.56320718052
variable vdelta equal (${delta_1000}-${delta})/1000
variable MAX_RADIUS equal 3.0870e+04
variable velocitystart equal -0.00316298702544561

# for 300 ps
#variable Tb0 equal 797.2082
#variable Tbl equal 302.2995
#variable delta equal 4.9412e3
#variable MAX_RADIUS equal 4.9173e4

variable box_boundary equal ${MAX_RADIUS}+2*${d_ensem}
variable MAX_RADIUS_OUT  equal ${MAX_RADIUS}+${d_ensem}#   equal (3.0*${V}/(4.0*PI))^(1.0/3.0)
variable MAX_RADIUS_IN  equal ${MAX_RADIUS}-${d_ensem}#   equal (3.0*${V}/(4.0*PI))^(1.0/3.0)
variable MAX_RADIUS_CORE  equal ${MAX_RADIUS}-2*${d_ensem}#   equal (3.0*${V}/(4.0*PI))^(1.0/3.0)

variable a equal -7.69e-17
variable c equal 1.9233e-16
variable A equal 2.681e-5 #linear para A of gas cond for Ar
variable B equal 1.346e-2 #linear para B of gas cond for Ar
variable kl equal 0.61 # liquid cond (water)


variable Rb equal ${MAX_RADIUS}
variable eta equal (${Rb}/${delta})*${kl}/$B

# Energy in Ionization
variable io1_ensem equal 1520.0*${scalefactor}
variable io2_ensem equal 2670.0*${scalefactor}
variable io3_ensem equal 3930.0*${scalefactor}
variable io4_ensem equal 5770.0*${scalefactor}
variable io5_ensem equal 7240.0*${scalefactor}
variable io6_ensem equal 8780.0*${scalefactor}
variable io7_ensem equal 12000.0*${scalefactor}
variable io8_ensem equal 13800.0*${scalefactor}
variable cutoff_ensem equal 10.0*${rscalefactor}
# Define the simulation box

#region bubble_sphere sphere 0.0 0.0 0.0 5 side in
region boundary sphere 0.0 0.0 0.0 ${box_boundary} side in
region   boundary_out  sphere 0.0 0.0 0.0 ${MAX_RADIUS_OUT} side in
region   boundary_in  sphere 0.0 0.0 0.0 ${MAX_RADIUS_IN} side in
region   bubble_sphere  sphere 0.0 0.0 0.0 ${MAX_RADIUS} side in

# creating the shell
create_box 1 boundary

# Create Ar atoms as spheres with positions and velocities sampled from a Boltzmann distribution
#create_atoms 1 random ${N_ensem} 88 boundary_in
create_atoms 1 ununiform ${N_ensem} 88 bubble_sphere ${a} ${c} ${MAX_RADIUS_IN} 512 overlap ${d_ensem} maxtry 50

group		another_all region boundary_in
# Set the mass and diameter for He atoms
fix mass all property/atom rmass ghost yes
fix timecollide all property/atom i_tlast
fix ionlabel all property/atom i_label ghost yes
fix ion_mindist all property/atom d_mindist ghost yes
set type 1 mass ${m_ensem}
set atom * i_tlast 0
set atom * i2_label -1
set atom * d_mindist 1e20
set atom * charge 0.0

#create velocity
variable Tblensem equal ${Tbl}*${scalefactor}
#velocity all create 2e9 4928459 rot yes dist uniform
#run 0
#velocity all scale ${Tblensem}
print "Tb0 IS ${Tb0}"
print "densem IS ${d_ensem}"
velocity all create ${Tinfty} 4928459 dist young ${Tb0} ${Tbl} ${A} ${B} ${eta} ${MAX_RADIUS_IN} ${scalefactor}
#velocity all create ${Tinfty} 4928459 rot yes dist young ${Tb0} ${Tbl} ${A} ${B} ${eta} ${MAX_RADIUS_IN} 1.0
#velocity all create ${Tinfty} 4928459 rot yes dist young ${Tb0} ${Tbl} ${A} ${B} ${eta} ${MAX_RADIUS_IN}
variable cutoff equal 2*${d_ensem}
variable thickness equal ${MAX_RADIUS}/2

# interaction style: io+coul
# kspace_style pppm 1e-4
# kspace_modify gewald 0.01
# pair_style hybrid/overlay lj/cutio ${cutoff} coul/long ${cutoff}
# pair_coeff * * lj/cutio 8 ${io1_ensem} ${io2_ensem} ${io3_ensem} ${io4_ensem} ${io5_ensem} ${io6_ensem} ${io7_ensem} ${io8_ensem} ${epsilon_ensem} ${sigma_ensem}
# pair_coeff * * coul/long
# kspace_modify compute yes
# set type 1 charge 0.0
#  neighbor        2.0 bin

#interaction style: io + short coul
# pair_style hybrid/overlay lj/cutio ${cutoff} coul/dsf 0.2 ${cutoff}
# pair_coeff * * lj/cutio 8 ${io1_ensem} ${io2_ensem} ${io3_ensem} ${io4_ensem} ${io5_ensem} ${io6_ensem} ${io7_ensem} ${io8_ensem} ${epsilon_ensem} ${sigma_ensem}
# pair_coeff * * coul/dsf
# # kspace_modify compute yes
# set type 1 charge 0.0


pair_style  lj/cutio/coul/dsf 0.2 ${cutoff} ${cutoff}
pair_coeff * * 8 ${io1_ensem} ${io2_ensem} ${io3_ensem} ${io4_ensem} ${io5_ensem} ${io6_ensem} ${io7_ensem} ${io8_ensem} ${epsilon_ensem} ${sigma_ensem}

# kspace_modify compute yes
set type 1 charge 0.0


# interaction style: io only
# pair_style lj/cutio ${cutoff}
# pair_coeff * * 8 ${io1_ensem} ${io2_ensem} ${io3_ensem} ${io4_ensem} ${io5_ensem} ${io6_ensem} ${io7_ensem} ${io8_ensem} ${epsilon_ensem} ${sigma_ensem}
# set type 1 charge 0.0

#1.52 2.67 3.93 5.77 7.24 8.78 12.0 13.8
#pair_style lj/cutio $d
#pair_coeff 1 1 8 1520 2670 3930 5770 7240 8780 12000 13800 ${epsilon} ${sigma}

#pair_style lj/cut 10.0
#pair_style lj/cut ${cutoff}
#pair_coeff 1 1 ${epsilon_ensem} ${sigma_ensem}
#pair_coeff 1 1 ${epsilon_ensem} ${sigma_ensem} ${cutoff}

# setting for ionization
comm_modify vel yes
#newton off on

#neigh_modify    delay 0 every 1 check yes
#neigh_modify binsize 2000.0
#neigh_modify one 10000

variable timestep equal 1.0
variable Nstep equal 1e4  #0/${timestep}
variable Steps2run equal 1e7/${timestep}
#minimize the energy to aviod overlap
minimize 1.0e-4 1.0e-4 1000 1000
#
#dump myDump all custom ${Nstep} ./mddumpfiles/SLMD_1fs_mix_coul_*.lammpstrj id type x y z vx vy vz fx fy fz q i_tlast
#dump myDump all custom ${Nstep} ./1_4fscoul/dump_1_4fs_1e5_*.lammpstrj id type x y z vx vy vz fx fy fz q
#dump myDump all custom 56 dump_1e5_2012_small*.lammpstrj id type x y z vx vy vz fx fy fz q

# Modify the dump format to use high-precision floating-point numbers
#dump_modify myDump format float "%.17f"


# Define outputs


# Run the simulationp


timestep	${timestep} #100 0 step=1 fs

#fix 1 all nve
fix		1 another_all nve

# variable RADIUS_FILE file ./R_data/16fs.txt
# variable DR_FILE file ./dR_data/16fs.txt
# variable TBL_FILE file ./Tbl_data/16fs.txt
# variable DELTA_FILE file ./delta_data/16fs.txt
variable RADIUS  equal ${MAX_RADIUS_OUT}
variable RADIUSIN equal ${MAX_RADIUS}-${cutoff}

# trmin= 185647
variable tstart equal 204790-50
#variable DR equal 23643.0507214136

#variable RADIUS  equal vdisplace(${MAX_RADIUS_OUT},-0.02)
#region km_shell shell 0.0 0.0 0.0 ${MAX_RADIUS_OUT} -0.02 1481 1000 1e5 0.072 0.001 ${cutoff} v_stresssum side in
#region km_shell shell 0.0 0.0 0.0 ${MAX_RADIUS} -0.00 1481 1000 1e5 0.072 0.001 ${cutoff} 1000.0 side in

region km_sphere kmsphere 0.0 0.0 0.0 ${MAX_RADIUS} ${velocitystart} 1481 1000 101325 0.072 0.001 ${cutoff} 26.5e3 1.3 ${tstart} ${scalefactor} ${Tinfty} ${alpha1} ${vdelta} ${delta} side in

#region km_sphere kmsphere 0.0 0.0 0.0 ${MAX_RADIUS} ${velocitystart}  v_delta side in
#region km_sphere sphere 0.0 0.0 0.0 ${MAX_RADIUS} side in
#region km_sphere kmsphere 0.0 0.0 0.0 ${MAX_RADIUS} -0.000857819372359499 1481 1000 101325 0.072 0.001 ${cutoff} 26.5e3 1.3 ${tstart} side in
#region km_sphere_out kmsphere 0.0 0.0 0.0 ${MAX_RADIUS_CORE} 0.0 1481 1000 1e5 0.072 0.001 10000.0 side in
#group atoms_shell dynamic all region km_shell
compute peratom all stress/atom NULL  # DO NOT DELETE !!!!
variable SLradius equal slradius(all,km_sphere)
variable RCORE equal v_SLradius/10.0
region core sphere 0.0 0.0 0.0 v_RCORE side in
variable SLvradius equal slvradius(all,km_sphere)
variable SLcount equal slcount(all,km_sphere)
variable SLpressure equal slpressure(all,km_sphere)
variable SLpb equal slpb(all,km_sphere)
variable SLTblgas equal slgastemp(all,km_sphere)/${scalefactor}
variable SLTwall equal slwalltemp(all,km_sphere)/${scalefactor}
variable SLdelta equal sldelta(all,km_sphere)
variable SLnumatoms equal slnumatoms(all,km_sphere)
variable SLvdelta equal slvdelta(all,km_sphere)
variable SLdebug equal sldebug(all,km_sphere)
variable SLsteps equal slsteps(all,km_sphere)

compute coretemp all temp/region core
variable corecount equal count(all,core)
#compute pout all reduce/region km_sphere_out sum c_peratom[1] c_peratom[2] c_peratom[3]
#compute pshell all reduce/region km_shell sum c_peratom[1] c_peratom[2] c_peratom[3]
compute pcore all reduce/region core sum c_peratom[1] c_peratom[2] c_peratom[3]
#compute countnum all
#compute psum all reduce/region km_sphere sum c_peratom[1] c_peratom[2] c_peratom[3]

#variable stressshell equal -(c_pshell[1]+c_pshell[2]+c_pshell[3])/(3*4*${pi}*${cutoff}*${MAX_RADIUS}^2)
variable presscore equal -(c_pcore[1]+c_pcore[2]+c_pcore[3])/(4.0*${pi}*${RCORE}^3)

#fix cache all store/state 1 v_stressshell
#variable stresssum equal -(c_psum[1]+c_psum[2]+c_psum[3])/(4*${pi}*${MAX_RADIUS}^3)
#variable stressout equal -(c_pout[1]+c_pout[2]+c_pout[3])
#variable stresssum equal -(c_p[1]+c_p[2]+c_p[3])/(4*${pi}*${MAX_RADIUS}^3)
#variable stresssum equal -(c_p[1]+c_p[2]+c_p[3])/(3*99010^3)

thermo 1000
thermo_style custom step dt time cpu vcpu tpcpu spcpu temp etotal press c_coretemp v_corecount v_SLradius v_SLdebug v_SLvradius v_SLcount v_SLpressure v_SLpb v_SLTblgas v_SLTwall v_SLdelta v_SLnumatoms v_presscore v_SLvdelta v_SLsteps
#thermo_style custom step temp etotal press

#region km_sphere kmsphere 0.0 0.0 0.0 ${MAX_RADIUS_OUT} -0.02 1481 1000 1e5 0.072 0.001 ${cutoff} v_stresssum side in


print "RADIUS start IS ${RADIUS}"

#fix wall all wall/region km_sphere lj126 ${epsilon_water_ensem} ${sigma_water_ensem} ${d_ensem}
#fix wall all wall/region bubble_sphere lj126 ${epsilon_ensem} ${sigma_ensem} ${d_ensem}
#fix wall all wall/mdhb km_sphere lj126 ${epsilon_ensem} ${sigma_ensem} ${cutoff} v_Tbl v_delta 1.0 ${scalefactor} 1000.0 4180.0 300.0
fix wall all wall/mdhb km_sphere lj126 ${epsilon_water_ensem} ${sigma_water_ensem} ${cutoff} 1.0 ${scalefactor} 1000.0 4180.0 300.0 ${Tbl}
fix_modify wall virial yes

variable RADIUS  equal next(RADIUS_FILE)

#variable DR equal next(DR_FILE)
variable Tbl equal next(TBL_FILE)
variable delta equal next(DELTA_FILE)
#read_dump dump_1fs_1e5_525000.lammpstrj 525000 x y z vx vy vz fx fy fz q
#read_dump ./1fs_coul/dump_1fs_1e5_525000.lammpstrj 525000 x y z vx vy vz fx fy fz q
#read_dump ./whole/dump_1fs_1e5_530000.lammpstrj 530000 x y z vx vy vz fx fy fz q
#read_dump ./mddumpfiles/SLMD_1fs_isothermal_coul_4400000.lammpstrj 4400000 x y z vx vy vz fx fy fz q
#timer full sync
reset_timestep 0


# exploring on the balancing method
fix rebalance all balance 100000 1.0 shift xyz 10 1.1  #out tmp_sphere_1e5_dsf_periodic_2.balance


# set a threshold for the maximum temperature
variable tmin equal 1.0
variable tmax equal 16.0
variable estimate_max_temp equal 80000
variable estimate_max_velocity equal sqrt(${estimate_max_temp}*3.0*${kB}*${NA}*1e-7/${m})
variable estimate_Xmax equal ${estimate_max_velocity}*${tmin}

fix adaptive_step all dt/reset 1000 ${tmin} ${tmax} ${estimate_Xmax}
fix whenhalt all halt 1000 v_SLsteps > 1e7
#run ${Steps2run}
run ${Steps2run}
#run 0
