# LAMMPS input script for simulating He molecules in a bubble with collision behavior
print ">>> INPUT STARTED" screen yes
print ">>> ABOUT TO RUN CLEAR" screen yes


# --- Initialization ---
clear
units real
dimension 3
boundary s s s
atom_style full

print ">>> FINISHED BASIC SETUP, ABOUT TO READ_DATA" screen yes


# --- Constants for Ar/He ---
variable pi equal 3.1415926
variable boltzmann equal 8.314462618  # J/(mol*K)
variable kB equal 1.380649e-23        # J/K
variable NA equal 6.02214076e23       # 1/mol
variable m equal 39.95                # g/mol
variable d equal 3.66                 # Angstroms
variable epslion_lj equal 116.81
variable epsilon equal ${boltzmann}*${epslion_lj}*0.00023901
variable epsilon_water_o equal 116.402
variable epsilon_water equal ${boltzmann}*${epsilon_water_o}*0.00023901
variable sigma equal 3.401
variable sigma_water equal 3.463

# --- Ensemble Particle Parameters ---
variable N_ensem equal 1e6
variable initialR equal 4.5e-6
variable Tinfty equal 300
variable Pinfty equal 101325
variable alpha1 equal 0.148e-6
variable V equal 4/3*${pi}*${initialR}^3
variable N equal ${Pinfty}*$V/(${kB}*${Tinfty})
variable scalefactor equal $N/${N_ensem}
variable halfscalefactor equal ${scalefactor}^(1.0/2.0)
variable rscalefactor equal ${scalefactor}^(1.0/3.0)
variable d_ensem equal ${rscalefactor}*$d
variable m_ensem equal ${scalefactor}*$m
variable epsilon_ensem equal ${epsilon}*${scalefactor}
variable epsilon_water_ensem equal ${epsilon_water}*${scalefactor}
variable sigma_ensem equal ${sigma}*${rscalefactor}
variable sigma_water_ensem equal ${sigma_water}*${rscalefactor}

# --- Temperature Profile for 100ps ---
variable Tb0 equal 2.530107262855020e+03
variable Tbl equal 3.153042568761739e+02
variable delta equal 2520.84869818185
variable vdelta equal -2.836392012821834e-04
variable MAX_RADIUS equal 3.086969205287614e+04
variable velocitystart equal -0.00316298702544561

# --- Geometry Definitions ---
variable box_boundary equal ${MAX_RADIUS}+2*${d_ensem}
variable MAX_RADIUS_OUT equal ${MAX_RADIUS}+${d_ensem}
variable MAX_RADIUS_IN equal ${MAX_RADIUS}-${d_ensem}
variable MAX_RADIUS_CORE equal ${MAX_RADIUS}-2*${d_ensem}

# --- Heat Conduction Properties ---
variable a equal -7.69e-17
variable c equal 1.9233e-16
variable A equal 2.681e-5
variable B equal 1.346e-2
variable kl equal 0.61
variable Rb equal ${MAX_RADIUS}
variable eta equal (${Rb}/${delta})*${kl}/$B

# --- Ionization Energies ---
variable io1_ensem equal 1520.0*${scalefactor}
variable io2_ensem equal 2670.0*${scalefactor}
variable io3_ensem equal 3930.0*${scalefactor}
variable io4_ensem equal 5770.0*${scalefactor}
variable io5_ensem equal 7240.0*${scalefactor}
variable io6_ensem equal 8780.0*${scalefactor}
variable io7_ensem equal 12000.0*${scalefactor}
variable io8_ensem equal 13800.0*${scalefactor}
variable cutoff_ensem equal 10.0*${rscalefactor}

# --- Create Simulation Regions ---
region boundary sphere 0.0 0.0 0.0 ${box_boundary} side in
region boundary_out sphere 0.0 0.0 0.0 ${MAX_RADIUS_OUT} side in
region boundary_in sphere 0.0 0.0 0.0 ${MAX_RADIUS_IN} side in
region bubble_sphere sphere 0.0 0.0 0.0 ${MAX_RADIUS} side in

#read_dump /home/shihan/projects/sonoluminescence/lammps/build/lammps_sequence_input/intialize/initialize_1000000.lammpstrj 0 x y z vx vy vz fx fy fz q
# create_box 1 boundary
print ">>> STARTING INPUT"
print ">>> ABOUT TO READ_DATA"
read_data /anvil/projects/x-phy250136/Time_Based_SL/build/lammps_sequence_input/initialize/initialize_lattice_1e6.lammpsdata
print ">>> FINISHED READ_DATA"

# atom_modify sort 0 0.0
# neigh_modify binsize 50.0
print ">>> FINISHED NEIGH MODIFY"
# create_atoms 1 ununiform ${N_ensem} 88 bubble_sphere ${a} ${c} ${MAX_RADIUS_IN} 512 overlap ${d_ensem} maxtry 50


group another_all region boundary_out

# --- Atom Properties ---
fix mass all property/atom rmass ghost yes
fix timecollide all property/atom i_tlast
fix ionlabel all property/atom i_label ghost yes
fix ion_mindist all property/atom d_mindist ghost yes

mass * ${m_ensem}
set atom * mass ${m_ensem}
set atom * i_tlast 0
set atom * i2_label -1
set atom * d_mindist 1e20
set atom * charge 0.0


# --- Velocity Initialization ---
variable Tblensem equal ${Tbl}*${scalefactor}
print "Tb0 IS ${Tb0}"
print "densem IS ${d_ensem}"
print "Max Radius IS ${MAX_RADIUS}"
print "Scalefactor IS ${scalefactor}"
print "rscalefactor IS ${rscalefactor}"
velocity all create ${Tinfty} 4928459 dist young ${Tb0} ${Tbl} ${A} ${B} ${eta} ${MAX_RADIUS_IN} ${scalefactor}

# --- Interaction Style ---
# variable cutoff equal ${d_ensem}
# variable cutoffcoul equal $d*${halfscalefactor}

variable cutoff equal 2.0*${d_ensem}
variable cutoffcoul equal 2.0*${d_ensem}
variable cutoffio equal 1.0*$d*${halfscalefactor}
# variable cutoffio equal 1.0*$d*${halfscalefactor}/10.0
variable thickness equal ${MAX_RADIUS}/2

variable active equal true
variable alpha equal 3.0/${cutoffcoul}
pair_style lj/cutio/coul/dsf ${alpha} ${cutoff} ${cutoffcoul} ${cutoff}
pair_coeff * * 8 ${io1_ensem} ${io2_ensem} ${io3_ensem} ${io4_ensem} ${io5_ensem} ${io6_ensem} ${io7_ensem} ${io8_ensem} ${epsilon_ensem} ${sigma_ensem} v_active ${scalefactor}

# neigh_modify one 10000

# pair_style lj/cut ${cutoff}
# pair_coeff * * ${epsilon_ensem} ${sigma_ensem}
# neigh_modify binsize 360.0

# pair_style lj/cut/coul/dsfnovel 0.2 ${cutoff} ${cutoff}
# pair_coeff * * ${epsilon_ensem} ${sigma_ensem}

set type 1 charge 0.0
comm_modify vel yes

# --- Simulation Parameters ---
variable timestep equal 1.0
variable Nstep equal 2e5
variable Steps2run equal 1e7/${timestep}

# --- restart strategy
dump myDump all custom ${Nstep} ./dumpfiles_01_13_1e6_alpha_0_5_shortio/1e6_31g_%.*.lammpstrj id type x y z vx vy vz fx fy fz q i_tlast i2_label d_mindist

# #read_sldump ./dumpfiles/debug_0.lammpstrj 0 x y z vx vy vz fx fy fz q i_tlast i2_label d_mindist
# #write_data data.*
# #restart 1000 restart
dump_modify myDump format 3 "%.31f"
dump_modify myDump format 4 "%.31f"
dump_modify myDump format 5 "%.31f"
dump_modify myDump format 6 "%.31f"
dump_modify myDump format 7 "%.31f"
dump_modify myDump format 8 "%.31f"
dump_modify myDump format 9 "%.31f"
dump_modify myDump format 10 "%.31f"
dump_modify myDump format 11 "%.31f"
# --- minimize
#minimize 1.0e-4 1.0e-4 1000 1000

# --- Time Control and Exit ---
reset_timestep 0
fix rebalance all balance 100000 1.0 shift xyz 10 1.1

# --- Time Evolution ---
timestep ${timestep}
fix 1 another_all nve

# --- Region & Output Variables ---
variable RADIUS equal ${MAX_RADIUS_OUT}
variable RADIUSIN equal ${MAX_RADIUS}-${cutoff}
variable tstart equal 204790-50

variable th_radius equal 3.086969205287614*1e-06
variable th_vradius equal -3.162987025445613*1e+02
variable th_aradius equal -4.094560456322810*1e+10
variable th_Tb0 equal 2.530107262855020*1e+03
variable th_delta equal 2.520848698181851*1e-07

region km_sphere kmsphere 0.0 0.0 0.0 ${MAX_RADIUS} ${MAX_RADIUS} ${velocitystart} 1481 1000 101325 0.072 0.001 ${cutoff} 26.5e3 1.3 ${tstart} ${scalefactor} ${Tinfty} ${alpha1} ${vdelta} ${delta} ${delta} ${th_radius} ${th_vradius} ${th_aradius} ${th_Tb0} ${th_delta} 0.0 0.0 side in

# --- Output and Derived Observables ---
compute peratom all stress/atom NULL
variable SLradius equal slradius(all,km_sphere)
variable SLradiusold equal slradiusold(all,km_sphere)
variable innerradius equal v_SLradius-${cutoff}
region outterbubble sphere 0.0 0.0 0.0 v_SLradius side in
region innerbubble sphere 0.0 0.0 0.0 v_innerradius side out
region shell intersect 2 outterbubble innerbubble
variable RCORE equal v_SLradius/10.0
region core sphere 0.0 0.0 0.0 v_RCORE side in

variable SLvradius equal slvradius(all,km_sphere)
variable SLcount equal slcount(all,km_sphere)
variable SLpB equal slpB(all,km_sphere)
variable SLpBold equal slpBold(all,km_sphere)
variable SLpb equal slpb(all,km_sphere)
variable SLTblgas equal slgastemp(all,km_sphere)/${scalefactor}
variable SLTwall equal slwalltemp(all,km_sphere)/${scalefactor}
variable SLdelta equal sldelta(all,km_sphere)
variable SLdeltaold equal sldeltaold(all,km_sphere)
variable SLnumatoms equal slnumatoms(all,km_sphere)
variable SLvdelta equal slvdelta(all,km_sphere)
variable SLdebug equal sldebug(all,km_sphere)
variable SLsteps equal slsteps(all,km_sphere)

variable THradius equal thradius(all,km_sphere)
variable THvradius equal thvradius(all,km_sphere)
variable THaradius equal tharadius(all,km_sphere)
variable THTb0 equal thTb0(all,km_sphere)
variable THdelta equal thdelta(all,km_sphere)

# compute coretemp all temp/region core
variable shellcount equal count(all,shell)
compute pcore all reduce/slregion core sum c_peratom[1] c_peratom[2] c_peratom[3]
compute pshell all reduce/slregion shell sum c_peratom[1] c_peratom[2] c_peratom[3]
compute pbubble all reduce/slregion km_sphere sum c_peratom[1] c_peratom[2] c_peratom[3]
compute coretemp all temp/region core
variable corecount equal count(all,core)

variable presscore equal -(c_pcore[1]+c_pcore[2]+c_pcore[3])/(4.0*${pi}*v_RCORE^3)
variable pressshell equal -(c_pshell[1]+c_pshell[2]+c_pshell[3])/(4.0*${pi}*v_SLradius^3-4.0*${pi}*v_innerradius^3)
variable pressbubble equal -(c_pbubble[1]+c_pbubble[2]+c_pbubble[3])/(4.0*${pi}*v_SLradius^3)

# -- Per-Atom Properties for per-atom
variable slvelocity atom sqrt(vx^2+vy^2+vz^2)
variable slcharge atom q
variable slvirial atom c_peratom[1]+c_peratom[2]+c_peratom[3]

# # attribute distribution
compute comdis all chunk/atom bin/sphere 0.0 0.0 0.0 0.0 ${MAX_RADIUS} 1000 discard yes
fix fixcomdis all ave/chunk 1000 1 1000 comdis temp v_slcharge v_slvelocity v_slvirial density/mass density/number file 1e6_comdis_01_13_alpha_0_5_shortio.out

thermo 1000
#thermo_style custom step dt time cpu vcpu tpcpu spcpu cpuuse temp etotal press v_pressbubble c_coretemp v_corecount v_SLradius v_SLdebug v_SLvradius v_SLcount v_SLpressure v_SLpb v_SLTblgas v_SLTwall v_SLdelta v_SLnumatoms v_presscore v_SLvdelta v_SLsteps v_THradius v_THvradius v_THaradius v_THTb0 v_THdelta
thermo_style custom step dt time cpu vcpu tpcpu spcpu cpuuse temp etotal press v_pressbubble v_pressshell c_coretemp v_corecount v_presscore v_shellcount v_SLradius v_SLradiusold v_SLdebug v_SLvradius v_SLcount  v_SLpB v_SLpBold v_SLpb v_SLTblgas v_SLTwall v_SLdelta v_SLdeltaold v_SLnumatoms  v_SLvdelta v_SLsteps v_THradius v_THvradius v_THaradius v_THTb0 v_THdelta
thermo_modify format float "%.31f"
# thermo_modify format v_SLdelta %14.15g
# thermo_modify format v_SLradius %.19g
# thermo_modify format v_SLpB %.19g

# --- Wall and Region Forces ---
fix wall all wall/mdhb km_sphere lj126 ${epsilon_water_ensem} ${sigma_water_ensem} ${cutoff} 0.5 ${scalefactor} 1000.0 4180.0 300.0 ${Tbl} ${Tbl}
#fix wall all wall/mdhb km_sphere lj126 0.0 ${sigma_water_ensem} ${cutoff} 1.0 ${scalefactor} 1000.0 4180.0 300.0 ${Tbl} ${Tbl}
fix_modify wall virial yes


# variable tmin equal 2.0
# variable tmax equal 16.0
# variable estimate_max_temp equal 320000
variable tmin equal 1.0
variable tmax equal 8.0
variable estimate_max_temp equal 80000
variable estimate_max_velocity equal sqrt(${estimate_max_temp}*3.0*${kB}*${NA}*1e-7/${m})
variable estimate_Xmax equal ${estimate_max_velocity}*${tmin}

fix adaptive_step all dt/reset 1000 ${tmin} ${tmax} ${estimate_Xmax}
fix whenhalt all halt 1000 v_SLsteps > 1e7
#run_style restartverlet
# neigh_modify  check no
run ${Steps2run}
# run 2000
# run 100
#run 50000
# run_style restartverlet
# run 20
